// SBML level 3 version 2

model BIOMD0000000012()
  // Elowitz2000 - Repressilator
  // model units - time: dimensionless

  // Parameters:
  X = 0 dimensionless; X is "LacI mRNA";
  Y = 20 dimensionless; Y is "TetR mRNA";
  Z = 0 dimensionless; Z is "cI mRNA";
  PX = 0 dimensionless; PX is "LacI protein";
  PY = 0 dimensionless; PY is "TetR protein";
  PZ = 0 dimensionless; PZ is "cI protein";
  tau_mRNA = 2 dimensionless; tau_mRNA is "mRNA half life";
  tau_prot = 10 dimensionless; tau_prot is "protein half life";
  eff = 20 dimensionless; eff is "translation efficiency";
  ps_0 = 0.0005 dimensionless; ps_0 is "tps_repr";
  ps_a = 0.5 dimensionless; ps_a is "tps_active";
  KM = 40 dimensionless;
  n = 2 dimensionless;
  cell = 1 dimensionless;
  t_ave = tau_mRNA/ln(2); t_ave has dimensionless; t_ave is "average mRNA life time";
  beta = tau_mRNA/tau_prot; beta has dimensionless;
  k_tl = eff/t_ave; k_tl has dimensionless;
  a_tr = (ps_a - ps_0)*60; a_tr has dimensionless;
  a0_tr = ps_0*60; a0_tr has dimensionless;
  kd_prot = ln(2)/tau_prot; kd_prot has dimensionless;
  kd_mRNA = ln(2)/tau_mRNA; kd_mRNA has dimensionless;
  alpha = a_tr*eff*tau_prot/(ln(2)*KM); alpha has dimensionless;
  alpha0 = a0_tr*eff*tau_prot/(ln(2)*KM); alpha0 has dimensionless;
  transcription_of_LacI has dimensionless;
  degradation_of_LacI_transcripts has dimensionless;
  transcription_of_TetR has dimensionless;
  degradation_of_TetR_transcripts has dimensionless;
  transcription_of_CI has dimensionless;
  degradation_of_CI_transcripts has dimensionless;
  degradation_of_LacI has dimensionless;
  translation_of_LacI has dimensionless;
  degradation_of_TetR has dimensionless;
  translation_of_TetR has dimensionless;
  degradation_of_CI has dimensionless;
  translation_of_CI has dimensionless;

  // Assignment rules:
  degradation_of_LacI_transcripts := kd_mRNA*X;
  degradation_of_TetR_transcripts := kd_mRNA*Y;
  degradation_of_CI_transcripts := kd_mRNA*Z;
  translation_of_LacI := k_tl*X;
  translation_of_TetR := k_tl*Y;
  translation_of_CI := k_tl*Z;
  degradation_of_LacI := kd_prot*PX;
  degradation_of_TetR := kd_prot*PY;
  degradation_of_CI := kd_prot*PZ;
  transcription_of_LacI := a0_tr + a_tr*KM^n/(KM^n + PZ^n);
  transcription_of_TetR := a0_tr + a_tr*KM^n/(KM^n + PX^n);
  transcription_of_CI := a0_tr + a_tr*KM^n/(KM^n + PY^n);

  // Rate rules:
  X' = -degradation_of_LacI_transcripts + transcription_of_LacI;
  Y' = -degradation_of_TetR_transcripts + transcription_of_TetR;
  Z' = -degradation_of_CI_transcripts + transcription_of_CI;
  PX' = translation_of_LacI - degradation_of_LacI;
  PY' = translation_of_TetR - degradation_of_TetR;
  PZ' = translation_of_CI - degradation_of_CI;

  // Unit definitions:
  unit volume = 1e-15 litre; volume is "cubic microns";
  unit substance = item; substance is "item";
  unit time = 60 second; time is "minute";
  unit substance_per_time = item / (60 second);
end
